N := 1024
fs := 400 kHz
df := fs/N = 390.625 Hz
f0 := 3.135 MHz
fdop := 60 kHz
ff := (f0 - fdop)/df = 7872
fsk1 := 7872*df - f0 = -60000 Hz
fsk2 := fsk1 - fs/1024 = -60390.6 Hz
fsk3 := fsk1 - fs/2048 = -60195.3 Hz
fsk4 := fsk1 - fs/4096 = -60097.7 Hz
fsk5 := fsk1 - fs/8192 = -60048.8 Hz
fn := 6.5 GHz
vc := (25 kHz/(2*fn))*c
st := c/(2*fn) = 0.023061 m
fd := (1800 m/s)*2*fn/c = 78.054 kHz
f0 - fd = 3056946 Hz
